N := 8
NA := 1
λ := 365*10^-9
σ := 0.1
z := 1*λ
k := 2*π/λ
Lx := 16*λ
Nmax := 10
xx := 0.5
Lx^2/(λ*z*2^N) = 1
t(x) :=
    1 if |x| < 2.5*λ
    0 otherwise
P(fx) :=
    1 if sqrt(fx^2) < Lx^2/(λ*z*2^N)*NA/λ
    0 otherwise
S(fx) :=
    1 if sqrt(fx^2) < σ*Lx^2/(λ*z*2^N)*NA/λ
    0 otherwise
reshape(M) :=
    N ← log(length(M), 2)
    for i ∈ 0 .. 2^(N - 1) - 1
        reshapeM[i] ← M[2^(N - 1) - i - 1]
        reshapeM[i + 2^(N - 1)] ← M[2^N - i - 1]
    for i ∈ 0 .. 2^N - 1
        reshapeM[i] ← reshapeM[i]*(-1)^(i + 1)
    reshapeM
zeromatrix :=
    for i ∈ 0 .. 2^N - 1
        zeromatrix[i] ← 0
    zeromatrix
i := 0 .. 2^N - 1
ii := 0 .. 2^(N + 1) - 1
e^(1i*2*π/λ*1/2*z*λ^2*(fx^2))
x[i] := -Lx/2 + Lx*i/2^N + Lx/2^(N + 1)
fx[i] := xx*x[i]/(λ*z)
Lx^2/(λ*z*2^N)*NA/λ = 2739726
doublex[ii] := -Lx + 2*Lx*ii/2^(N + 1) + Lx/2^(N + 1)
doublefx[ii] := xx*doublex[ii]/(λ*z)
doublefx[0] = -21875000
t[i] := t(x[i])
P[i] := P(fx[i])
S[ii] := S(doublefx[ii])
NA/λ = 2739726
T := reshape(cfft(t))
h := reshape(cfft(P))
J0 := reshape(cfft(S))
kernal :=
    for x1 ∈ 0 .. 2^N - 1
        for x2 ∈ 0 .. 2^N - 1
            M[x1, x2] ← J0[x2 - x1 + 2^N - 1]*h[x1]*conj(h[x2])
    Val ← svds(M)
    Vec ← svd2(M)[1]
    for state ∈ 0 .. Nmax - 1
        Kernal[state] ← reshape(cfft(Vec[:, state]))
        Kernal[Nmax + state] ← Val[state]
    Kernal
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I :=
    Itotal ← zeromatrix
    for state ∈ 0 .. Nmax - 1
        Λ ← kernal[Nmax + state]
        Φ ← kernal[state]
        for i ∈ 0 .. 2^N - 1
            ΦT[i] ← Φ[i]*T[i]
        ϕt ← icfft(reshape(ΦT))
        for i ∈ 0 .. 2^N - 1
            ϕt[i] ← |ϕt[i]|^2*Λ
        Itotal ← Itotal + ϕt
    Itotal
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