w0 := 0.15/2
λ := 0.532*10^-3
N := 2*256
Z := 20000
M := N
R := 3
zR := π*w0^2/λ
Q := 7
w := w0*sqrt(1 + (Z/zR)^2)
θG(z) := atan(z/zR)
D := 2*max(13*λ*Z/(1*R), 1.5*R)
i := 0 .. N - 1
j := 0 .. N - 1
D = 92.2133
y[j] := -D + j/(N - 1)*2*D
x[i] := -D + i/(N - 1)*2*D
ρ[i, j] := sqrt(x[i]^2 + y[j]^2)
ϕ[i, j] := atan2(x[i], y[j])
θ := 0/180*π
Ψ[i, j] := 2/w^2*sum(e^(-(1 - 1i*Z/zR)*(ρ[i, j]^2 + R^2 - 2*ρ[i, j]*R*cos(ϕ[i, j] - 2*π/Q*s))/w^2), s = 0 .. Q - 1)
Ψ2[i, j] := sum(e^(1i*2*π/λ*(x[i]/Z*R*cos(2*π/Q*s) + y[j]/Z*R*sin(2*π/Q*s))), s = 0 .. Q - 1)
Ψ1[i, j] := 2*20/w^2*e^(-(1 - 1i*Z/zR)*(ρ[i, j]^2)/w^2)*e^(1i*θ) + Ψ[i, j]
Ψ3[i, j] := 20*e^(1i*(θ + π*210/180)) + Ψ2[i, j]
I[i, j] := |Ψ[i, j]|^2
I1[i, j] := |Ψ1[i, j]|^2
I2[i, j] := |Ψ2[i, j]|^2
I3[i, j] := |Ψ3[i, j]|^2
# [component: inputs I1]
# [component: inputs I2]
# [component: inputs I]
# [component: inputs I3]
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br(A) :=
    j ← 0
    N ← length(A)
    for i ∈ 0 .. N - 2
        if i < j
            T ← A[j]
            A[j] ← A[i]
            A[i] ← T
        k ← N/2
        while 1
            break if k ≥ j + 1
            j ← j - k
            k ← k/2
        j ← j + k
    A
ft(A) :=
    N ← length(A)
    N2 ← N
    s ← log(N, 2)
    for k ∈ 1 .. s
        N1 ← N2
        N2 ← N2/2
        arg ← 2*π/N1
        kk ← N2
        for i ∈ 0, N1 .. N - 1
            for j ∈ 0 .. N2 - 1
                jj ← j + i
                T ← A[jj] - A[jj + kk]
                A[jj] ← A[jj] + A[jj + kk]
                A[jj + kk] ← T*e^(-1i*arg*j)
                F[jj] ← A[jj]
                F[jj + kk] ← A[jj + kk]
    F
FFT(A) := br(ft(A))
FFT2(A) :=
    for j ∈ 0 .. M - 1
        B ← FFT(A[:, j])
        for i ∈ 0 .. N - 1
            C[i, j] ← B[i]
    for i ∈ 0 .. N - 1
        D ← FFT(transpose(C)[:, i])
        for j ∈ 0 .. M - 1
            E[i, j] ← D[j]
    E
shiftFFT(A) :=
    for i ∈ 0 .. N - 1
        for j ∈ 0 .. M - 1
            B[i + 0.5*N - 1, j + 0.5*M - 1] ← A[i, j] if i < N/2 and j < M/2
            B[i - 0.5*N - 1, j + 0.5*M - 1] ← A[i, j] if i > N/2 and j ≤ M/2
            B[i - 0.5*N - 1, j - 0.5*M - 1] ← A[i, j] if i > N/2 and j > M/2
            B[i + 0.5*N - 1, j - 0.5*M - 1] ← A[i, j] if i ≤ N/2 and j > M/2
    B
ift(A) :=
    N ← length(A)
    N2 ← N
    s ← log(N, 2)
    for k ∈ 1 .. s
        N1 ← N2
        N2 ← N2/2
        arg ← 2*π/N1
        kk ← N2
        for i ∈ 0, N1 .. N - 1
            for j ∈ 0 .. N2 - 1
                jj ← j + i
                T ← A[jj] - A[jj + kk]
                A[jj] ← A[jj] + A[jj + kk]
                A[jj + kk] ← T*e^(1i*arg*j)
                F[jj] ← A[jj]
                F[jj + kk] ← A[jj + kk]
    F
iFFT(A) := br(ift(A))
iFFT2(A) :=
    for j ∈ 0 .. M - 1
        B ← iFFT(A[:, j])
        for i ∈ 0 .. N - 1
            C[i, j] ← B[i]
    for i ∈ 0 .. N - 1
        D ← iFFT(transpose(C)[:, i])
        for j ∈ 0 .. M - 1
            E[i, j] ← D[j]
    E
iF0 := 1/(M*N)*iFFT2(I)
G := 350
iF := shiftFFT(iF0)
ii := 0 .. G - 1
jj := 0 .. G - 1
IFF[i, j] := iF[i, j]
IFF2[ii, jj] := IFF[ii + (N - G + 2)/2, jj + (N - G + 2)/2]
# [component: inputs IFF2]
iiF0 := 1/(M*N)*iFFT2(IFF)
iiF := shiftFFT(iiF0)
IIFF[i, j] := |iiF0[i, j]|
IIFF2[ii, jj] := IIFF[ii + (N - G + 2)/2, jj + (N - G + 2)/2]
# [component: inputs IIFF2]
iFFT(A) := br(ift(A))
iFFT2(A) :=
    for j ∈ 0 .. M - 1
        B ← iFFT(A[:, j])
        for i ∈ 0 .. N - 1
            C[i, j] ← B[i]
    for i ∈ 0 .. N - 1
        D ← iFFT(transpose(C)[:, i])
        for j ∈ 0 .. M - 1
            E[i, j] ← D[j]
    E
