N := 5
NA := 1
λ := 365*10^-9
σ := 0.1
z := 1*λ
k := 2*π/λ
Lx := 6*λ
Nmax := 10
Lx^2/(λ*z*2^N) = 1.125
t(x, y) :=
    1 if |x - 1*λ| < 0.2*λ or |x + 1*λ| < 0.2*λ
    0 otherwise
P(fx, fy) :=
    e^(1i*2*π/λ*1/2*z*λ^2*(fx^2 + fy^2)) if sqrt(fx^2 + fy^2) < Lx^2/(λ*z*2^N)*NA/λ
    0 otherwise
S(fx, fy) :=
    1/(π*(σ*Lx^2/(λ*z*2^N)*NA/λ)^2) if sqrt(fx^2 + fy^2) < σ*Lx^2/(λ*z*2^N)*NA/λ
    0 otherwise
reshape(M) :=
    N ← log(cols(M), 2)
    for i ∈ 0 .. 2^(N - 1) - 1
        for j ∈ 0 .. 2^(N - 1) - 1
            reshapeM[i, j] ← M[2^(N - 1) - i - 1, 2^(N - 1) - j - 1]
            reshapeM[i + 2^(N - 1), j] ← M[2^N - i - 1, 2^(N - 1) - j - 1]
            reshapeM[i, j + 2^(N - 1)] ← M[2^(N - 1) - i - 1, 2^N - j - 1]
            reshapeM[i + 2^(N - 1), j + 2^(N - 1)] ← M[2^N - i - 1, 2^N - j - 1]
    for i ∈ 0 .. 2^N - 1
        for j ∈ 0 .. 2^N - 1
            reshapeM[i, j] ← reshapeM[i, j]*(-1)^(i + j)
    reshapeM
zeromatrix :=
    for i ∈ 0 .. 2^N - 1
        for j ∈ 0 .. 2^N - 1
            zeromatrix[i, j] ← 0
    zeromatrix
i := 0 .. 2^N - 1
j := 0 .. 2^N - 1
ii := 0 .. 2^(N + 1) - 1
jj := 0 .. 2^(N + 1) - 1
x[i] := -Lx/2 + Lx*i/2^N + Lx/2^(N + 1)
y[j] := -Lx/2 + Lx*j/2^N + Lx/2^(N + 1)
fx[i] := 1*x[i]/(λ*z)
fy[j] := 1*y[j]/(λ*z)
doublex[ii] := -Lx + 2*Lx*ii/2^(N + 1) + Lx/2^(N + 1)
doubley[jj] := -Lx + 2*Lx*jj/2^(N + 1) + Lx/2^(N + 1)
doublefx[ii] := 1*doublex[ii]/(λ*z)
doublefy[jj] := 1*doubley[jj]/(λ*z)
t[i, j] := t(x[i], y[j])
P[i, j] := P(fx[i], fy[j])
S[ii, jj] := S(doublefx[ii], doublefy[jj])
phiT := phi*T  # error: 该变量未定义。
T := reshape(cfft(t))
h := reshape(cfft(P))
J0 := reshape(cfft(S))
# [component: inputs J0]
# [component: inputs S]
kernal :=
    for x1 ∈ 0 .. 2^N - 1
        for y1 ∈ 0 .. 2^N - 1
            for x2 ∈ 0 .. 2^N - 1
                for y2 ∈ 0 .. 2^N - 1
                    M[x2, y2] ← J0[x2 - x1 + 2^N - 1, y2 - y1 + 2^N - 1]*h[x1, y1]*conj(h[x2, y2])
                    W[x1*2^N + x2, y1*2^N + y2] ← M[x2, y2]
    Val ← svds(W)
    Vec ← svd2(W)[1]
    for state ∈ 0 .. Nmax
        for i ∈ 0 .. 2^N - 1
            for j ∈ 0 .. 2^N - 1
                ϕ[i, j] ← Vec[:, state][i*2^N + j]
        Kernal[state] ← reshape(cfft(ϕ))
        Kernal[2^N + state] ← Val[state]
    Kernal
I :=
    Itotal ← zeromatrix
    for state ∈ 0 .. Nmax
        Λ ← kernal[2^N + state]
        Φ ← kernal[state]
        for i ∈ 0 .. 2^N - 1
            for j ∈ 0 .. 2^N - 1
                ΦT[i, j] ← Φ[i, j]*T[i, j]
        ϕt ← icfft(reshape(ΦT))
        for i ∈ 0 .. 2^N - 1
            for j ∈ 0 .. 2^N - 1
                ϕt[i, j] ← |ϕt[i, j]|^2*Λ
        Itotal ← Itotal + ϕt
    Itotal
# [component: inputs t]
kernal =  # no stored result
# [component: inputs h]
# [component: inputs kernal[0]]
# [component: inputs I]
# [component: inputs kernal]
kernal =  # no stored result
